# ЛР 1
# 4пары=8 проводов
# 7-витков
d := 0.5  # мм
d := 0.5*10^-3  # м
D := d*10^-3 = 5e-7
S := π*(d/2)^2 = 1.9635e-7
S := S*8*2 = 3.14159e-6
ρ := 1.68*10^-8 = 1.68e-8
L := 58.2
R := ρ*(L/S) = 0.311231
# Проводимость
G := 1/R = 3.21305
