a := 5
b := 14
c := 7
(a - месяц)*рождения
(b - день)*рождения
d := a + b + c = 26
(c - номер)*по*журналу
k := 1 .. 15
p(k) :=
    i ← 0
    for i ∈ 1 .. d
        p ← floor(rnd(10))
p(k) = [6; 0; 9; 2; 0; 8; 2; 5; 9; 7; 8; 4; 0; 2; 2]
p(k) := [7; 1; 5; 5; 5; 9; 3; 0; 0; 5; 3; 3; 8; 9; 0]
1
s(t) := h*sqrt(π)/α*e*(-1*(ω^2/(4*α^2)))  # error: Эта переменная не определена.
2
S(1j*ω) := hτ*(1 - cos(ωτ/2))/(ωτ/2)^2  # error: Здесь необходимо указать имя.
h := 5
3
τ := 5
4
K := 5
5
γ := 9
6
# процент  от полной энергии сигнала | 7
# вид модуляции | 8
# частота несущей f0 | 9
# f1 и f2
10
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# амплитуда несущей | 11
# Δφ | 12
# μ | 13
# N0 | 14
# 7-форма регулярного  сигнала
(4я - цифра)*шифра - 5
h, B - 0.4
(5я - цифра)*шифра - 5
α := 0.5
Mu := 0
f := 400  # Гц
# Гаусовский сигнал
(4я - цифра)*шифра - 5
Du, Вт = 0, 4  # error: Эта переменная не определена.
Du := 0.4
(5я - цифра)*шифра - 5
# Параметр АКФ
0, 5
τ := 1/(c*10^3) = 0.000142857
(6я - цифра)*шифра - 9
K := 38
(7*я - цифра)*шифра - 3
γ := 50
(8я - цифра)*шифра - 0
% := 98.5
(9*я - цифра)*шифра - 0
# Вид модуляции-АМ
(10*я - цифра)*шифра - 5
A0 := 0.1
(11*я - цифра)*шифра - 3
f0 := 7*10^3  # Гц
(12*я - цифра)*шифра - 3
f1 := 11*10^3
f2 := 12.1*10^3
(13*я - цифра)*шифра - 8
Δφ := π/4
(14*я - цифра)*шифра - 9
μ := 0.05
(15*я - цифра)*шифра - 0
N0 := 10^-14  # Вт/Гц
s(t) := h*sqrt(π)/α*e*(-1*(ω^2/(4*α^2)))  # error: Расчет в этом определении недопустим.
S(1j*ω) := hτ*(1 - cos(ωτ/2))/(ωτ/2)^2  # error: Расчет в этом определении недопустим.
