# Временная функция
h := 2*10^-3
A := 9*10^3
U(t) := (h*e^(-A*t))/10^-3
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# Спектральная плотность
sqrt(-(0.5*h^2/(a^2*w^2)))
# четная функция b(w)=0
b(w) := -w*h/(A^2*w^2)
a(w) := A*h/(A^2*w^2)
F(w) := sqrt(a(w)^2 + b(w)^2)
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b(w) := -w*h/(A^2*w^2)
a(w) := A*h/(A^2*w^2)
ϕ(w) := acot(b(w)/a(w))
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-h/(a*e^at)
S2(w) := integral(h*e^(-a*t), t)  # error: Эта переменная не определена.
