S := 100000
UBН := 6300
UНН := 400
rк := 8.3
Xк := 16.25
rм := 1931
Xм := 15134
U1Н := UBН/sqrt(3)
U1Н = 3637.31
U1ф := U1Н
I1Н := S/(3*U1ф)
I1Н = 9.16429
I1f := I1Н
U2H := UНН
U2f := U2H
I2Н := S/(3*U2H)
I2ф := I2Н
Kл := UBН/UНН
Kф := U1ф/U2f
Zм := sqrt(rм^2 + Xм^2)
I10 := U1Н/Zм
P0 := 3*(rм*I10^2)
rм = 1931
I10^2 = 0.056838
□ < -(-(-(-(-□)))) < РУКУКУКУККУ
P0 = 329.263
Zк := sqrt(rм^2 + Xм^2)
uк := I1Н*Zк/U1Н*100
uкр := I1Н*Xк/U1Н*100
uка := I1Н*rк/U1Н*100
Uк := uк*U1Н/100
r1 := rк/2
I1н := Uк/Zк
r12 := r1
I1н = 9.16429
x1 := Xк/2
x12 := x1
Pк := 3*(rк*I1н^2)
Pк = 2091.21
uк = 3843.96
uкр = 4.09423
uка = 2.09121
DU2 := 0.75*(uка*0.8 + uкр*0.6)
DU2 = 3.09713
DU2н := 1*(uка*0.8 + uкр*0.6)
DU2н = 4.1295
U20 := U2H*(1 + DU2н/100)
U2 := U20*(1 - DU2/100)
U2 = 403.618
U12 := U2*Kф
Pс := P0 - I10*r1
Pс = 328.273
Pс = 328.273
P2_1 := 1*S*0.8 = 80000
P2_25 := 0.25*S*0.8 = 20000
P2_50 := 0.5*S*0.8 = 40000
P2_75 := 0.75*S*0.8 = 60000
Ep_75 := P0 + (0.75^2*Pк)*3 = 3858.17
Ep_1 := P0 + (1^2*Pк)*3 = 6602.88
Ep_25 := P0 + (0.25^2*Pк)*3 = 721.364
Ep_50 := P0 + (0.5^2*Pк)*3 = 1897.67
n_1 := (1 - Ep_1/(P2_1 + Ep_1))*100 = 92.3757
n_75 := (1 - Ep_75/(P2_75 + Ep_75))*100 = 93.9582
n_25 := (1 - Ep_25/(P2_25 + Ep_25))*100 = 96.5187
n_50 := (1 - Ep_50/(P2_50 + Ep_50))*100 = 95.4707
n_25 = 96.5187
n_50 = 95.4707
n_75 = 93.9582
n_1 = 92.3757
Bм := sqrt(P0/Pк)
Ep_25 := P0 + (Bм^2*Pк)
P2max := Bм*S*0.8
EPmax := P0 + (Bм^2*Pк)
Nmax := (1 - EPmax/(P2max + EPmax))*100
Nmax = 97.9677
Du2_25p := 0.25*(uка*0.8 + uкр*0.6)
Du2_75p := 0.75*(uка*0.8 + uкр*0.6)
Du2_50p := 0.5*(uка*0.8 + uкр*0.6)
Du2_1p := 1*(uка*0.8 + uкр*0.6)
U2_25p := U20*(1 - Du2_25p/100)
U2_75p := U20*(1 - Du2_75p/100)
U2_50p := U20*(1 - Du2_50p/100)
U2_1p := U20*(1 - Du2_1p/100)
uка*0.8 - uкр*0.6
Du2_25m := 0.25*(uка*0.8 - uкр*0.6)
Du2_75m := 0.75*(uка*0.8 - uкр*0.6)
Du2_50m := 0.5*(uка*0.8 - uкр*0.6)
Du2_1m := 1*(uка*0.8 - uкр*0.6)
U2_25m := U20*(1 - Du2_25m/100)
U2_75m := U20*(1 - Du2_75m/100)
U2_50m := U20*(1 - Du2_50m/100)
U2_1m := U20*(1 - Du2_1m/100)
# B | 0.25 | 0.5 | 0.75 | 1
U2, B(f > 0)
U2_25p = 412.218
U2_50p = 407.918
U2_75p = 403.618
U2_1p = 399.318
U2, B(f < 0)
U2_25m = 417.334
U2_50m = 418.15
U2_75m = 418.966
U2_1m = 419.782
