Iн := 346
nн := 1000
ф := 0.93
Uн := 110
фн := 1
Mн := 305.6
rя := 0.0164
rв := 11.0
Pн := (Mн*nн)/9.55 = 32000
n := Pн/(Iн*Uн)
n := n*100 = 84.0778
Iвн := Uн/rв
Iвн = 10
Iян := Iн - Iвн = 336
Iях := (Iн^2*rя)/Uн = 17.8486
rв2 := rв + 4.4 = 15.4
Iв := Uн/rв = 10
Iях = 17.8486
nхх := nн*((Uн - rя*Iях)/(Uн - rя*Iян)) = 1049.93
Iян = 336
Uн = 110
Iях2 := Iях*фн/ф
Iях2 = 19.192
rя = 0.0164
Mс := 0.7*Mн = 213.92
Mс = 213.92
Mн = 305.6
Iя2 := Iян*фн/ф*Mс/Mн
Iя2 = 252.903
Mс/Mн = 0.7
nхх2 := nн*(Uн - rя*Iях2)/(Uн - rя*Iян)*фн/ф = 1128.74
Iян^2 := 336
rя = 0.0164
n2 := nн*(Uн - rя*Iя2)/(Uн - rя*Iян)*фн/ф
n2 = 1089.29
P := Mс*n2/9.55
P = 24400.2
Iян^2*rя = 1851.49
EP := Iян^2*rя + Iвн^2*(rв + rв2) + Iян^2*rя = 6342.99
n := Pн/(Pн*EP)*100 = 0.0157654
Pн = 32000
