# Пункты задания, подлежащие выполнению: 1, 3, 14 | Вариант | I_н, A | n_н, об/мин | U_н, В | M_н, Н×м | r_я, Ом | r_в, Ом
# 71 | 8,7 | 1500 | 220 | 9,55 | 1,85 | 490,0
# 72 | 18,4 | 1500 | 220 | 20,37 | 0,67 | 156,0
# 73 | 73,0 | 1060 | 220 | 121,6 | 0,126 | 183,0
# 74 | 64,0 | 685 | 220 | 167,3 | 0,281 | 128,0
# 75 | 86,0 | 1000 | 110 | 76,4 | 0,0618 | 42,4
# 76 | 66,0 | 1500 | 110 | 38,2 | 0,1026 | 45,2
# 77 | 346,0 | 1000 | 110 | 305,6 | 0,0164 | 11,0
# 78 | 275,0 | 750 | 110 | 318,3 | 0,0252 | 11,0
# 79 | 172,0 | 1000 | 220 | 305,6 | 0,0666 | 44,0
# 80 | 65,0 | 500 | 220 | 210,0 | 0,2895 | 44,0
# Вариант | I_н, A | n_н, об/мин | U_н, В | M_н, Н×м | r_я, Ом | r_в, Ом
# 77 | 346,0 | 1000 | 110 | 305,6 | 0,0164 | 11,0
Iн := 346.0
Uн := 110
rя := 0.0164
nн := 1000
Mн := 305.6
rв := 11.0
Mн*nн = 305600
Pн := Mн*nн/9.55 = 32000
Uн*Iн = 38060
n := Pн/(Iн*Uн)*100 = 84.0778
Uн/rв = 10
Iвн := 110/11 = 10
Iя.н := Iн*Iвн = 3460
Iн*10 = 3460
Iя.х := Iн^2*rя/Uн = 17.8486
(346*346*rя)/Uн = 17.8486
rв = 11
rв := rв + 4.4 = 15.4
Uн/rв = 7.14286
Iв := Uн/rв = 7.14286
Ф := 0.93
Фн := 1
Iв/Iвн = 0.714286
Ф/Фн = 0.93
Uн = 110
rя = 0.0164
Iя.х = 17.8486
nхх := nн*(Uн - rя*Iя.х)/(Uн - rя*Iя.н) = 2060
Iя.н = 3460
nн = 1000
nхх := 2.008*10^3
Mс := 0.7*Mн = 213.92
1000*(110 - 0.016*17.849)/(110 - 0.016*3.46*10^3) = 2007.95
I'я.х := Iя.х*Фн/Ф = 19.192
Mс/Mн = 0.7
I'я := Iя.н*Фн/Ф*Mс/Mн = 2604.3
__________________________________________________
n'хх := nн*(Uн - rя*I'я.х)/(Uн - rя*Iя.н)*Фн/Ф = 2214.61
Iя.н = 3460
Iвн = 10
n' := nн*(Uн - rя*I'я)/(Uн - rя*Iя.н)*Фн/Ф = 1358.61
I'я = 2604.3
rя = 0.0164
rв = 15.4
rд := 10*rя = 0.164
Iя.н = 3460
Mс = 213.92
P := Mс*n'/9.55 = 30432.9
Pн = 32000
P = 30432.9
ΔPя.н := Iя.н^2*rя = 196334
ΔPвн := Iвн^2*rя = 1.64
rд := 10*rя = 0.164
ΣP := ΔPя.н + ΔPвн + ΔPя.н = 392670
ΣP := Iя.н^2*rя + Iвн^2*(rв + rд) + Iя.н^2*rя = 394225
392700 = 392700
0.0002547 = 0.0002547
32000 = 32000
n := Pн/(Pн*5079.32)*100 = 0.0196877
Mс = 213.92
Mс := 0.8*Mн = 244.48
