МП36А
U_кэ := 15
E_k := 11
h_11b := 20
I_k := 40
h_12b := 5*10^-3
P_доп := 150
f_н := 100
h_21b := -0.96
fв := 10000
h_22b := 2*10^-6
h_11э := h_11b/(1 + h_21b) = 500
h_12э := (h_11b*h_22b - h_12b*h_21b - h_12b)/(1 + h_21b) = -0.004
h_21э := -h_21b/(1 + h_21b) = 24
h_22э := h_21b/(1 + h_21b) = -24
r_вх_транз := h_11э
B := h_22э
Δt := 10
j := 0.2
E_э := j*|E_k| = 2.2
I_0b := 0.05
I_0k := B*I_0b = -1.2
R_э := E_э/(I_0k + I_0b) = -1.91304
I_0э := I_0b + I_0k = -1.15
ΔI_0k_min := 0.025
ΔI_0k := I_0k(exp^(0.077*Δt) - 1)  # error: Значение должно быть скаляром или матрицей.
ΔI_0k := 0.075
a := -h_21b = 0.96
S_доп := ΔI_0k_min/ΔI_0k = 0.333333
R_c := R_э*(S_доп - 1)/(1 - S_доп*(1 - a)) = 1.2926
S_реал := (1 + R_э/R_c)/(1 - a + R_э/R_c) = 0.333333
# S_реал | S_доп
0.333 = 0.333
U_0b := -0.3
R_b := R_c*|E_k|/(|E_k| - U_0b - E_э - R_c*I_0b) = 1.57366
R_1 := R_b*R_c/(R_b - R_c) = 7.23727
I_д := (U_0b + E_э)/R_b = 1.20738
I_0k = -1.2
R_2 := (E_k - I_д*R_1)/(I_д + I_0b) = 1.79887
R_k := (|E_k| - U_0b - E_э)/I_0k = -7.58333
ω_н := 2*π*f_н = 628.319
C_э := 10^7/(2*2*π*f_н*R_э) = -4159.73
1/(ω_н*C_э) = -3.82609e-7
(0.1 - 0.05)*R_э = -0.0956522
R_k = -7.58333
R_b = 1.57366
R_э = -1.91304
R_H := h_11э
R_каск_вх := R_b*r_вх_транз/(R_b + r_вх_транз) = 1.56872
R_каск_вых := R_k/(1 + h_22э*R_k) = -0.041439
a := I_вх/I_вых  # error: Эта переменная не определена. Проверьте правильность установки обозначения.
a := -h_21b
h_21b := h_21э/(1 + h_21э) = 0.96
I_вых := -h_21э = -24
I_вх := -(1 + h_21э) = -25
a := h_21b = 0.96
K_I := I_вх/I_вых = 1.04167
K_U := B*R_k/R_каск_вх = 116.018
K_P := K_I*K_U = 120.852
U_m_вых := 0.12
P_вых := 0.5*U_m_вых^2/R_k = -0.000949451
P_0 := I_0э*E_k + I_д^2*(R_1 + R_2) + I_0b^2*R_2 = 0.527074
η_э := (P_вых/P_0)*100 = -0.180136
γ := R_э/(R_b + R_э) = 5.63676
S := 1 + R_k/R_э = 4.96402
S := B/(1 + B*γ) = 0.178728
S := (R_b + R_э)/((1 + h_21b)*R_b + R_э) = -0.289747
